#!/usr/bin/env python
import Sofa
import Sofa.Gui
from config import base_config
from sofasurgsim.managers.organ_manager import OrganManager
from sofasurgsim.interfaces.ros_interface import ROSClient

class SOFASceneController:
    def __init__(self, ros_client: ROSClient, GUI: bool):

        self.root_node = Sofa.Core.Node("root")
        self.root_node.addObject('DefaultAnimationLoop')
        self.root_node.addObject('DefaultVisualManagerLoop')

        self.cfg = base_config.BaseConfig()
        self.GUI = GUI
        self.ros_client = ros_client
        self.root_node.dt.value = self.cfg.SIMULATION_STEP

        self.organ_manager = self.root.addObject(OrganManager(
            ros_client=self.ros_client,
            name="OrganManager"
        ))

    def _create_scene(self):
        """
        Crea gli oggetti nella scena di SOFA utilizzando i dati iniziali ricevuti dai topic ROS.
        """
        self.root_node.gravity=[0, -9.81, 0]
        self.root_node.dt=0.02

        self.root_node.addObject("RequiredPlugin", pluginName=[    'Sofa.Component.Collision.Detection.Algorithm',
        'Sofa.Component.Collision.Detection.Intersection',
        'Sofa.Component.Collision.Geometry',
        'Sofa.Component.Collision.Response.Contact',
        'Sofa.Component.Constraint.Projective',
        'Sofa.Component.IO.Mesh',
        'Sofa.Component.LinearSolver.Iterative',
        'Sofa.Component.Mapping.Linear',
        'Sofa.Component.Mass',
        'Sofa.Component.ODESolver.Backward',
        'Sofa.Component.SolidMechanics.FEM.Elastic',
        'Sofa.Component.StateContainer',
        'Sofa.Component.Topology.Container.Dynamic',
        'Sofa.Component.Visual',
        'Sofa.GL.Component.Rendering3D'
        ])

        self.root_node.addObject('DefaultAnimationLoop')

        self.root_node.addObject('VisualStyle', displayFlags="showCollisionModels hideVisualModels showForceFields")
        self.root_node.addObject('CollisionPipeline', name="CollisionPipeline")
        self.root_node.addObject('BruteForceBroadPhase', name="BroadPhase")
        self.root_node.addObject('BVHNarrowPhase', name="NarrowPhase")
        self.root_node.addObject('CollisionResponse', name="CollisionResponse", response="PenalityContactForceField")
        self.root_node.addObject('DiscreteIntersection')

    def run_simulation(self):
        self._create_scene()
        Sofa.Simulation.init(self.root_node)

        if not self.GUI:
            import time
            while True:
                Sofa.Simulation.animate(self.root_node, self.root_node.dt.value)
                time.sleep(0.01)
        else:
            Sofa.Gui.GUIManager.Init("main", "qglviewer")
            Sofa.Gui.GUIManager.createGUI(self.root_node)
            Sofa.Gui.GUIManager.MainLoop(self.root_node)
            Sofa.Gui.GUIManager.closeGUI()
